# Микрополосковая линия
# Фторопласт армированный ФАФ-4
l := 1  # длина линии
# ширина, мм
# волновое сопротивление, Ом
# эффективная диэлектрическая проницаемость
H := 0.001  # толщина (высота) диэлектрика
e := 2.6
tgD := 1*10^-3  # тангенс угла диэлектрических потерь
f := 6*10^9
r(W) := 377*H/(W*sqrt(e)*(1 + 1.735*e^-0.0724*(W/H)^-0.836))
w50 := 0.001
izm := [
    0.2, 150.693, 1.88744;
    1, 87.0527, 2.02706;
    2, 60.5892, 2.12521;
    2.73267, 50, 2.17642;
    3, 47.048, 2.19236;
    4, 38.6364, 2.24272;
    5, 32.8588, 2.28241;
    6, 28.6294, 2.31468;
    7, 25.3923, 2.34149;
    8, 22.8316, 2.36414;
    9, 20.7533, 2.38351;
    10, 19.0315, 2.40026;
    11, 17.5809, 2.41487;
    12, 16.3414, 2.42771;
    13, 15.2694, 2.43909;
    14, 14.3329, 2.44922;
    15, 13.5072, 2.4583;
    16, 12.7734, 2.46647;
    17, 12.1169, 2.47387;
    18, 11.5258, 2.48059;
    19, 10.9906, 2.48673;
    20, 10.5037, 2.49235
]
w50 := root(r(w50) - 50, w50)
w50 = 0.00276339
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w50izm := 2.73267*10^-3
Δw50 := |w50 - w50izm| = 3.07175e-5
δw50 := Δw50/w50 = 0.0111159
δw50 = 1.11159 %
eef_w50izm := 2.17642
eef(W) := (e + 1)/2 + (e - 1)/2*(1 + 10*H/W)^(-1/2)
Δeef_w50 := |eef(w50) - eef_w50izm| = 0.00417583
eef(w50) = 2.17224
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δeef_w50 := Δeef_w50/eef(w50) = 0.00192236
δeef_w50 = 0.192236 %
λ0(f) := c/f
λlizm(f) := c/(f*sqrt(eef_w50izm))
f := 10^9, 1.1*10^9 .. 10^10
λl(f) := λ0(f)/sqrt(eef(w50))
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# Коаксиальная линия
# Вспененный полиэтилен
di := 0.6
e := 1.5
tdD := 0.3*10^-3
d := di, 2*di .. 10*di
r(d) := 138/sqrt(e)*log(d/di, 10)
r(d) = [0; 33.919; 53.7604; 67.838; 78.7575; 87.6794; 95.2227; 101.757; 107.521; 112.677]
d50 := 0.001
d50 := root(r(d50) - 50, d50)
d50 = 1.66686
λ0(f) := c/f
λl(f) := λ0(f)/sqrt(e)
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